Sun Jun  1 12:00:00 PM UTC 2025
$PROBLEM Warfarin LTBS (log(DV) ~ additive) - ferx-core cross-check (issue #120)
$DATA warfarin_log.csv IGNORE=@
$INPUT ID TIME DV EVID AMT CMT=DROP RATE MDV
$SUBROUTINES ADVAN2 TRANS2
$PK
  CL = THETA(1)*EXP(ETA(1))
  V  = THETA(2)*EXP(ETA(2))
  KA = THETA(3)*EXP(ETA(3))
  S2 = V
$ERROR
  IPRED = LOG(F)
  Y = IPRED + EPS(1)
$THETA (0, 0.2)   ; TVCL
$THETA (0, 10.0)  ; TVV
$THETA (0, 1.5)   ; TVKA
$OMEGA 0.09       ; ETA_CL
$OMEGA 0.04       ; ETA_V
$OMEGA 0.30       ; ETA_KA
$SIGMA 0.0225     ; additive variance on log scale (SD 0.15)
$ESTIMATION METHOD=1 INTER MAXEVAL=9999 NSIG=3 SIGL=9 PRINT=5 NOABORT
$COVARIANCE UNCONDITIONAL
$TABLE ID TIME IPRED NOPRINT ONEHEADER FILE=sdtab_ltbs

NM-TRAN MESSAGES
 WARNINGS AND ERRORS (IF ANY) FOR PROBLEM    1
 (WARNING  2) NM-TRAN INFERS THAT THE DATA ARE POPULATION.
Note: Analytical 2nd Derivatives are constructed in FSUBS but are never used.
      You may insert $ABBR DERIV2=NO after the first $PROB to save FSUBS construction and compilation time

1NONLINEAR MIXED EFFECTS MODEL PROGRAM (NONMEM) VERSION 7.5.1
 ORIGINALLY DEVELOPED BY STUART BEAL, LEWIS SHEINER, AND ALISON BOECKMANN
 CURRENT DEVELOPERS ARE ROBERT BAUER, ICON DEVELOPMENT SOLUTIONS,
 AND ALISON BOECKMANN. IMPLEMENTATION, EFFICIENCY, AND STANDARDIZATION
 PERFORMED BY NOUS INFOSYSTEMS.
 PROBLEM NO.:         1
 Warfarin LTBS (log(DV) ~ additive) - ferx-core cross-check (issue #120)
 TOT. NO. OF OBS RECS:      110
 TOT. NO. OF INDIVIDUALS:       10
 ONE COMPARTMENT MODEL WITH FIRST-ORDER ABSORPTION (ADVAN2)
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 #TBLN:      1
 #METH: First Order Conditional Estimation with Interaction
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
 #TERM:
0MINIMIZATION TERMINATED
 DUE TO ROUNDING ERRORS (ERROR=134)
 NO. OF FUNCTION EVALUATIONS USED:     2740
 NO. OF SIG. DIGITS IN FINAL EST.:  1.9
 ADDITIONAL PROBLEMS OCCURRED WITH THE MINIMIZATION.
 REGARD THE RESULTS OF THE ESTIMATION STEP CAREFULLY, AND ACCEPT THEM ONLY
 AFTER CHECKING THAT THE COVARIANCE STEP PRODUCES REASONABLE OUTPUT.

 ETABAR IS THE ARITHMETIC MEAN OF THE ETA-ESTIMATES,
 AND THE P-VALUE IS GIVEN FOR THE NULL HYPOTHESIS THAT THE TRUE MEAN IS 0.

 ETABAR:         4.3031E-06 -4.1573E-05 -1.5289E-04
 SE:             5.3454E-02  3.0936E-02  1.8319E-01
 N:                      10          10          10

 P VAL.:         9.9994E-01  9.9893E-01  9.9933E-01

 ETASHRINKSD(%)  3.7409E-02  1.7577E-01  5.5012E-02
 ETASHRINKVR(%)  7.4805E-02  3.5124E-01  1.0999E-01
 EBVSHRINKSD(%)  2.8017E-02  1.7086E-01  3.1430E-02
 EBVSHRINKVR(%)  5.6026E-02  3.4142E-01  6.2850E-02
 RELATIVEINF(%)  9.9944E+01  9.9658E+01  9.9937E+01
 EPSSHRINKSD(%)  1.4692E+01
 EPSSHRINKVR(%)  2.7225E+01


 TOTAL DATA POINTS NORMALLY DISTRIBUTED (N):          110
 N*LOG(2PI) CONSTANT TO OBJECTIVE FUNCTION:    202.16647730502800
 OBJECTIVE FUNCTION VALUE WITHOUT CONSTANT:   -675.30155444585273
 OBJECTIVE FUNCTION VALUE WITH CONSTANT:      -473.13507714082471
 REPORTED OBJECTIVE FUNCTION DOES NOT CONTAIN CONSTANT

 TOTAL EFFECTIVE ETAS (NIND*NETA):                            30


 #TERE:
 Elapsed estimation  time in seconds:     0.68
 Elapsed covariance  time in seconds:     0.02
 Elapsed postprocess time in seconds:     0.01

 ********************               FIRST ORDER CONDITIONAL ESTIMATION WITH INTERACTION              ********************
 #OBJT:**************                       MINIMUM VALUE OF OBJECTIVE FUNCTION                      ********************
 #OBJV:********************************************     -675.302       **************************************************

 ********************               FIRST ORDER CONDITIONAL ESTIMATION WITH INTERACTION              ********************
 ********************                             FINAL PARAMETER ESTIMATE                           ********************

 THETA - VECTOR OF FIXED EFFECTS PARAMETERS   *********
         TH 1      TH 2      TH 3
         1.33E-01  7.74E+00  8.11E-01

 OMEGA - COV MATRIX FOR RANDOM EFFECTS - ETAS  ********
         ETA1      ETA2      ETA3
 ETA1
+        2.86E-02
 ETA2
+        0.00E+00  9.60E-03
 ETA3
+        0.00E+00  0.00E+00  3.36E-01

 SIGMA - COV MATRIX FOR RANDOM EFFECTS - EPSILONS  ****
         EPS1
 EPS1
+        1.12E-04

 OMEGA - CORR MATRIX FOR RANDOM EFFECTS - ETAS  *******
         ETA1      ETA2      ETA3
 ETA1
+        1.69E-01
 ETA2
+        0.00E+00  9.80E-02
 ETA3
+        0.00E+00  0.00E+00  5.80E-01

 SIGMA - CORR MATRIX FOR RANDOM EFFECTS - EPSILONS  ***
         EPS1
 EPS1
+        1.06E-02

 ********************               FIRST ORDER CONDITIONAL ESTIMATION WITH INTERACTION              ********************
 ********************                            STANDARD ERROR OF ESTIMATE                          ********************

 THETA - VECTOR OF FIXED EFFECTS PARAMETERS   *********
         TH 1      TH 2      TH 3
         7.10E-03  2.40E-01  1.49E-01

 OMEGA - COV MATRIX FOR RANDOM EFFECTS - ETAS  ********
         ETA1      ETA2      ETA3
 ETA1
+        1.09E-02
 ETA2
+       .........  3.98E-03
 ETA3
+       ......... .........  1.40E-01

 SIGMA - COV MATRIX FOR RANDOM EFFECTS - EPSILONS  ****
         EPS1
 EPS1
+        1.69E-05

 OMEGA - CORR MATRIX FOR RANDOM EFFECTS - ETAS  *******
         ETA1      ETA2      ETA3
 ETA1
+        3.23E-02
 ETA2
+       .........  2.03E-02
 ETA3
+       ......... .........  1.20E-01

 SIGMA - CORR MATRIX FOR RANDOM EFFECTS - EPSILONS  ***
         EPS1
 EPS1
+        7.99E-04

 ********************               FIRST ORDER CONDITIONAL ESTIMATION WITH INTERACTION              ********************
 ********************                          COVARIANCE MATRIX OF ESTIMATE                         ********************

            TH 1      TH 2      TH 3      OM11      OM12      OM13      OM22      OM23      OM33      SG11
 TH 1
+        5.04E-05
 TH 2
+        1.96E-04  5.78E-02
 TH 3
+       -3.26E-04  1.25E-02  2.21E-02
 OM11
+        1.88E-05  2.85E-04 -2.34E-04  1.19E-04
 OM12
+       ......... ......... ......... ......... .........
 OM13
+       ......... ......... ......... ......... ......... .........
 OM22
+       -7.86E-06 -7.25E-04 -1.72E-04 -9.52E-06 ......... .........  1.59E-05
 OM23
+       ......... ......... ......... ......... ......... ......... ......... .........
 OM33
+        5.00E-05  3.36E-04  9.99E-03 -4.36E-04 ......... .........  6.70E-05 .........  1.95E-02
 SG11
+       -5.87E-09  2.50E-06  2.14E-07  7.23E-08 ......... ......... -3.43E-08 ......... -1.11E-06  2.85E-10

 ********************               FIRST ORDER CONDITIONAL ESTIMATION WITH INTERACTION              ********************
 ********************                          CORRELATION MATRIX OF ESTIMATE                        ********************

            TH 1      TH 2      TH 3      OM11      OM12      OM13      OM22      OM23      OM33      SG11
 TH 1
+        7.10E-03
 TH 2
+        1.15E-01  2.40E-01
 TH 3
+       -3.09E-01  3.49E-01  1.49E-01
 OM11
+        2.43E-01  1.08E-01 -1.44E-01  1.09E-02
 OM12
+       ......... ......... ......... ......... .........
 OM13
+       ......... ......... ......... ......... ......... .........
 OM22
+       -2.78E-01 -7.57E-01 -2.90E-01 -2.19E-01 ......... .........  3.98E-03
 OM23
+       ......... ......... ......... ......... ......... ......... ......... .........
 OM33
+        5.04E-02  1.00E-02  4.81E-01 -2.86E-01 ......... .........  1.20E-01 .........  1.40E-01
 SG11
+       -4.90E-02  6.16E-01  8.54E-02  3.92E-01 ......... ......... -5.10E-01 ......... -4.73E-01  1.69E-05
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 Elapsed finaloutput time in seconds:     0.00
 #CPUT: Total CPU Time in Seconds,        0.715
